# OpenSim document version 20200
Model:
  credits: Model authors names..
  publications: List of publications related to model...
  length_units: meters
  force_units: N
  gravity: 0 0 0
  defaults: Schutte1993Muscle default: min_control=0 max_control=1 time_scale=0 activation1=0 activation2=0
      max_isometric_force=546 optimal_fiber_length=0.0535 tendon_slack_length=0.078 pennation_angle=0.1396263
      max_contraction_velocity=0 damping=1
    tendon_force_length_curve: NaturalCubicSpline: x=(-10 -0.002 -0.001 0 0.00131 0.00281 0.00431 0.00581 0.00731 0.00881 0.0103 0.0118 0.0123 9.2 9.201 9.202 20)
        y=(0 0 0 0 0.0108 0.0257 0.0435 0.0652 0.0915 0.123 0.161 0.208 0.227 345 345 345 345)
    active_force_length_curve: NaturalCubicSpline: x=(-35 0 0.401 0.402 0.4035 0.52725 0.62875 0.71875 0.86125 1.045 1.2175 1.43875 1.61875 1.62 1.621 2.2 35)
        y=(0 0 0 0 0 0.226667 0.636667 0.856667 0.95 0.993333 0.77 0.246667 0 0 0 0 0)
    passive_force_length_curve: NaturalCubicSpline: x=(-35 0.998 0.999 1.15 1.25 1.35 1.45 1.55 1.65 1.75 1.7501 1.7502 35)
        y=(0 0 0 0 0.035 0.12 0.26 0.55 1.17 2 2 2 2)
  ForceSet Muscles:
    Schutte1993Muscle DELT1: min_control=0 max_control=1 time_scale=0 activation1=0 activation2=0
        max_isometric_force=3427.8 optimal_fiber_length=0.0976 tendon_slack_length=0.093 pennation_angle=0.3839724
        max_contraction_velocity=0 damping=1
      PathPoint P1: humerus (0.00896 -0.11883 0.00585)
      PathPoint P2: humerus (0.01623 -0.11033 0.00412)
      PathPoint P3: scapula (0.04347 -0.03252 0.00099)
      PathPoint P4: clavicle (-0.014 0.01106 0.08021)
      tendon_force_length_curve: NaturalCubicSpline: x=(-10 -0.002 -0.001 0 0.00131 0.00281 0.00431 0.00581 0.00731 0.00881 0.0103 0.0118 0.0123 9.2 9.201 9.202 20)
          y=(0 0 0 0 0.0108 0.0257 0.0435 0.0652 0.0915 0.123 0.161 0.208 0.227 345 345 345 345)
      active_force_length_curve: NaturalCubicSpline: x=(-35 0 0.401 0.402 0.4035 0.52725 0.62875 0.71875 0.86125 1.045 1.2175 1.43875 1.61875 1.62 1.621 2.2 35)
          y=(0 0 0 0 0 0.226667 0.636667 0.856667 0.95 0.993333 0.77 0.246667 0 0 0 0 0)
      passive_force_length_curve: NaturalCubicSpline: x=(-35 0.998 0.999 1.15 1.25 1.35 1.45 1.55 1.65 1.75 1.7501 1.7502 35)
          y=(0 0 0 0 0.035 0.12 0.26 0.55 1.17 2 2 2 2)
    Schutte1993Muscle DELT2: min_control=0 max_control=1 time_scale=0 activation1=0 activation2=0
        max_isometric_force=3427.8 optimal_fiber_length=0.1078 tendon_slack_length=0.1095 pennation_angle=0.2617994
        max_contraction_velocity=0 damping=1
      PathPoint P1: humerus (0.00461 -0.13611 0.0056)
      PathPoint P2: humerus (0.02431898 -0.05 0.04736455)
      PathPoint P3: scapula (0.00005 0.0294 0.02233)
      PathPoint P4: scapula (-0.01078 -0.00034 0.0062)
      tendon_force_length_curve: NaturalCubicSpline: x=(-10 -0.002 -0.001 0 0.00131 0.00281 0.00431 0.00581 0.00731 0.00881 0.0103 0.0118 0.0123 9.2 9.201 9.202 20)
          y=(0 0 0 0 0.0108 0.0257 0.0435 0.0652 0.0915 0.123 0.161 0.208 0.227 345 345 345 345)
      active_force_length_curve: NaturalCubicSpline: x=(-35 0 0.401 0.402 0.4035 0.52725 0.62875 0.71875 0.86125 1.045 1.2175 1.43875 1.61875 1.62 1.621 2.2 35)
          y=(0 0 0 0 0 0.226667 0.636667 0.856667 0.95 0.993333 0.77 0.246667 0 0 0 0 0)
      passive_force_length_curve: NaturalCubicSpline: x=(-35 0.998 0.999 1.15 1.25 1.35 1.45 1.55 1.65 1.75 1.7501 1.7502 35)
          y=(0 0 0 0 0.035 0.12 0.26 0.55 1.17 2 2 2 2)
    Schutte1993Muscle DELT3: min_control=0 max_control=1 time_scale=0 activation1=0 activation2=0
        max_isometric_force=1559.28 optimal_fiber_length=0.1367 tendon_slack_length=0.038 pennation_angle=0.3141593
        max_contraction_velocity=0 damping=1
      PathPoint P1: scapula (-0.05573 0.00122 -0.02512)
      PathPoint P2: scapula (-0.07247 -0.03285 0.01233)
      ConditionalPathPoint default: humerus (-0.0102079 0.0222093 0.00130625) range=(1.74533 3.2) coordinate=arm_flex
      ConditionalPathPoint default: humerus (-0.0236443 -0.005806 0.0038) range=(0.872665 3.2) coordinate=arm_flex
      PathPoint P2.9: humerus (-0.00206 -0.065 0.01045)
      PathPoint P3: humerus (0.00206 -0.07602 0.01045)
      tendon_force_length_curve: NaturalCubicSpline: x=(-10 -0.002 -0.001 0 0.00131 0.00281 0.00431 0.00581 0.00731 0.00881 0.0103 0.0118 0.0123 9.2 9.201 9.202 20)
          y=(0 0 0 0 0.0108 0.0257 0.0435 0.0652 0.0915 0.123 0.161 0.208 0.227 345 345 345 345)
      active_force_length_curve: NaturalCubicSpline: x=(-35 0 0.401 0.402 0.4035 0.52725 0.62875 0.71875 0.86125 1.045 1.2175 1.43875 1.61875 1.62 1.621 2.2 35)
          y=(0 0 0 0 0 0.226667 0.636667 0.856667 0.95 0.993333 0.77 0.246667 0 0 0 0 0)
      passive_force_length_curve: NaturalCubicSpline: x=(-35 0.998 0.999 1.15 1.25 1.35 1.45 1.55 1.65 1.75 1.7501 1.7502 35)
          y=(0 0 0 0 0.035 0.12 0.26 0.55 1.17 2 2 2 2)
    Schutte1993Muscle PECM1: min_control=0 max_control=1 time_scale=0 activation1=0 activation2=0
        max_isometric_force=1093.23 optimal_fiber_length=0.1442 tendon_slack_length=0.0028 pennation_angle=0.296706
        max_contraction_velocity=0 damping=1
      PathPoint P1: humerus (0.01169 -0.04191 0.0078)
      PathPoint P2: humerus (0.01700222 -0.0275 -0.001)
      PathPoint P3: clavicle (0.01058242 -0.01982146 0.09335063)
      PathPoint P4: clavicle (0.00321 -0.00013 0.05113)
      tendon_force_length_curve: NaturalCubicSpline: x=(-10 -0.002 -0.001 0 0.00131 0.00281 0.00431 0.00581 0.00731 0.00881 0.0103 0.0118 0.0123 9.2 9.201 9.202 20)
          y=(0 0 0 0 0.0108 0.0257 0.0435 0.0652 0.0915 0.123 0.161 0.208 0.227 345 345 345 345)
      active_force_length_curve: NaturalCubicSpline: x=(-35 0 0.401 0.402 0.4035 0.52725 0.62875 0.71875 0.86125 1.045 1.2175 1.43875 1.61875 1.62 1.621 2.2 35)
          y=(0 0 0 0 0 0.226667 0.636667 0.856667 0.95 0.993333 0.77 0.246667 0 0 0 0 0)
      passive_force_length_curve: NaturalCubicSpline: x=(-35 0.998 0.999 1.15 1.25 1.35 1.45 1.55 1.65 1.75 1.7501 1.7502 35)
          y=(0 0 0 0 0.035 0.12 0.26 0.55 1.17 2 2 2 2)
    Schutte1993Muscle PECM2: min_control=0 max_control=1 time_scale=0 activation1=0 activation2=0
        max_isometric_force=1546.23 optimal_fiber_length=0.1385 tendon_slack_length=0.089 pennation_angle=0.4363323
        max_contraction_velocity=0 damping=1
      PathPoint P1: humerus (0.01274 -0.04289 0.00785)
      PathPoint P2: humerus (0.01538222 -0.0355 -0.003)
      PathPoint P3: thorax (0.02036778 -0.03541 0.1236211)
      PathPoint P4: thorax (0.03091 -0.03922 0.09705)
      PathPoint P5: thorax (0.02769 -0.04498 0.02271)
      tendon_force_length_curve: NaturalCubicSpline: x=(-10 -0.002 -0.001 0 0.00131 0.00281 0.00431 0.00581 0.00731 0.00881 0.0103 0.0118 0.0123 9.2 9.201 9.202 20)
          y=(0 0 0 0 0.0108 0.0257 0.0435 0.0652 0.0915 0.123 0.161 0.208 0.227 345 345 345 345)
      active_force_length_curve: NaturalCubicSpline: x=(-35 0 0.401 0.402 0.4035 0.52725 0.62875 0.71875 0.86125 1.045 1.2175 1.43875 1.61875 1.62 1.621 2.2 35)
          y=(0 0 0 0 0 0.226667 0.636667 0.856667 0.95 0.993333 0.77 0.246667 0 0 0 0 0)
      passive_force_length_curve: NaturalCubicSpline: x=(-35 0.998 0.999 1.15 1.25 1.35 1.45 1.55 1.65 1.75 1.7501 1.7502 35)
          y=(0 0 0 0 0.035 0.12 0.26 0.55 1.17 2 2 2 2)
    Schutte1993Muscle PECM3: min_control=0 max_control=1 time_scale=0 activation1=0 activation2=0
        max_isometric_force=1171.65 optimal_fiber_length=0.1385 tendon_slack_length=0.132 pennation_angle=0.4363323
        max_contraction_velocity=0 damping=1
      PathPoint P1: humerus (0.01269 -0.04375 0.0075)
      PathPoint P2: humerus (0.01401702 -0.0473 -0.004)
      PathPoint P3: thorax (0.02984 -0.07002241 0.1151)
      PathPoint P4: thorax (0.0525 -0.08417 0.08935)
      PathPoint P5: thorax (0.05724 -0.11654 0.03787)
      tendon_force_length_curve: NaturalCubicSpline: x=(-10 -0.002 -0.001 0 0.00131 0.00281 0.00431 0.00581 0.00731 0.00881 0.0103 0.0118 0.0123 9.2 9.201 9.202 20)
          y=(0 0 0 0 0.0108 0.0257 0.0435 0.0652 0.0915 0.123 0.161 0.208 0.227 345 345 345 345)
      active_force_length_curve: NaturalCubicSpline: x=(-35 0 0.401 0.402 0.4035 0.52725 0.62875 0.71875 0.86125 1.045 1.2175 1.43875 1.61875 1.62 1.621 2.2 35)
          y=(0 0 0 0 0 0.226667 0.636667 0.856667 0.95 0.993333 0.77 0.246667 0 0 0 0 0)
      passive_force_length_curve: NaturalCubicSpline: x=(-35 0.998 0.999 1.15 1.25 1.35 1.45 1.55 1.65 1.75 1.7501 1.7502 35)
          y=(0 0 0 0 0.035 0.12 0.26 0.55 1.17 2 2 2 2)
    Schutte1993Muscle TRIlong: min_control=0 max_control=1 time_scale=0 activation1=0 activation2=0
        max_isometric_force=798.52 optimal_fiber_length=0.134 tendon_slack_length=0.143 pennation_angle=0.2094395
        max_contraction_velocity=0 damping=1
      PathPoint P1: scapula (-0.04565 -0.04073 -0.01377)
      PathPoint P2: humerus (-0.02714 -0.11441 -0.00664)
      PathPoint P3: humerus (-0.03184 -0.22637 -0.01217)
      PathPoint P4: humerus (-0.01743 -0.26757 -0.01208)
      ConditionalPathPoint P4.5: humerus (-0.01251 -0.299402 -0.012256) coordinate=elbow_flex range=(1.221731 3.2)
      PathPoint P5: ulna (-0.0219 0.01046 -0.00078)
      tendon_force_length_curve: NaturalCubicSpline: x=(-10 -0.002 -0.001 0 0.00131 0.00281 0.00431 0.00581 0.00731 0.00881 0.0103 0.0118 0.0123 9.2 9.201 9.202 20)
          y=(0 0 0 0 0.0108 0.0257 0.0435 0.0652 0.0915 0.123 0.161 0.208 0.227 345 345 345 345)
      active_force_length_curve: NaturalCubicSpline: x=(-35 0 0.401 0.402 0.4035 0.52725 0.62875 0.71875 0.86125 1.045 1.2175 1.43875 1.61875 1.62 1.621 2.2 35)
          y=(0 0 0 0 0 0.226667 0.636667 0.856667 0.95 0.993333 0.77 0.246667 0 0 0 0 0)
      passive_force_length_curve: NaturalCubicSpline: x=(-35 0.998 0.999 1.15 1.25 1.35 1.45 1.55 1.65 1.75 1.7501 1.7502 35)
          y=(0 0 0 0 0.035 0.12 0.26 0.55 1.17 2 2 2 2)
    Schutte1993Muscle TRIlat: min_control=0 max_control=1 time_scale=0 activation1=0 activation2=0
        max_isometric_force=624.3 optimal_fiber_length=0.1138 tendon_slack_length=0.098 pennation_angle=0.1570796
        max_contraction_velocity=0 damping=1
      PathPoint P1: humerus (-0.00599 -0.12646 0.00428)
      PathPoint P2: humerus (-0.02344 -0.14528 0.00928)
      PathPoint P3: humerus (-0.03184 -0.22637 -0.01217)
      PathPoint P4: humerus (-0.01743 -0.26757 -0.01208)
      ConditionalPathPoint P4.5: humerus (-0.01251 -0.299402 -0.012256) coordinate=elbow_flex range=(1.221731 3.2)
      PathPoint P5: ulna (-0.0219 0.01046 -0.00078)
      tendon_force_length_curve: NaturalCubicSpline: x=(-10 -0.002 -0.001 0 0.00131 0.00281 0.00431 0.00581 0.00731 0.00881 0.0103 0.0118 0.0123 9.2 9.201 9.202 20)
          y=(0 0 0 0 0.0108 0.0257 0.0435 0.0652 0.0915 0.123 0.161 0.208 0.227 345 345 345 345)
      active_force_length_curve: NaturalCubicSpline: x=(-35 0 0.401 0.402 0.4035 0.52725 0.62875 0.71875 0.86125 1.045 1.2175 1.43875 1.61875 1.62 1.621 2.2 35)
          y=(0 0 0 0 0 0.226667 0.636667 0.856667 0.95 0.993333 0.77 0.246667 0 0 0 0 0)
      passive_force_length_curve: NaturalCubicSpline: x=(-35 0.998 0.999 1.15 1.25 1.35 1.45 1.55 1.65 1.75 1.7501 1.7502 35)
          y=(0 0 0 0 0.035 0.12 0.26 0.55 1.17 2 2 2 2)
    Schutte1993Muscle TRImed: min_control=0 max_control=1 time_scale=0 activation1=0 activation2=0
        max_isometric_force=624.3 optimal_fiber_length=0.1138 tendon_slack_length=0.0908 pennation_angle=0.1570796
        max_contraction_velocity=0 damping=1
      PathPoint P1: humerus (-0.00838 -0.13695 -0.00906)
      PathPoint P2: humerus (-0.02601 -0.15139 -0.0108)
      PathPoint P3: humerus (-0.03184 -0.22637 -0.01217)
      PathPoint P4: humerus (-0.01743 -0.26757 -0.01208)
      ConditionalPathPoint P4.5: humerus (-0.01251 -0.299402 -0.012256) coordinate=elbow_flex range=(1.221731 3.2)
      PathPoint P5: ulna (-0.0219 0.01046 -0.00078)
      tendon_force_length_curve: NaturalCubicSpline: x=(-10 -0.002 -0.001 0 0.00131 0.00281 0.00431 0.00581 0.00731 0.00881 0.0103 0.0118 0.0123 9.2 9.201 9.202 20)
          y=(0 0 0 0 0.0108 0.0257 0.0435 0.0652 0.0915 0.123 0.161 0.208 0.227 345 345 345 345)
      active_force_length_curve: NaturalCubicSpline: x=(-35 0 0.401 0.402 0.4035 0.52725 0.62875 0.71875 0.86125 1.045 1.2175 1.43875 1.61875 1.62 1.621 2.2 35)
          y=(0 0 0 0 0 0.226667 0.636667 0.856667 0.95 0.993333 0.77 0.246667 0 0 0 0 0)
      passive_force_length_curve: NaturalCubicSpline: x=(-35 0.998 0.999 1.15 1.25 1.35 1.45 1.55 1.65 1.75 1.7501 1.7502 35)
          y=(0 0 0 0 0.035 0.12 0.26 0.55 1.17 2 2 2 2)
    Schutte1993Muscle BIClong: min_control=0 max_control=1 time_scale=0 activation1=0 activation2=0
        max_isometric_force=499.44 optimal_fiber_length=0.1157 tendon_slack_length=0.2723 pennation_angle=0
        max_contraction_velocity=0 damping=1
      PathPoint P1: scapula (-0.03123 -0.02353 -0.01305)
      PathPoint P2: scapula (-0.02094 -0.01309 -0.00461)
      PathPoint P3: humerus (0.02131 0.01793 0.01028)
      PathPoint P4: humerus (0.02378 -0.00511 0.01201)
      PathPoint P5: humerus (0.01345 -0.02827 0.00136)
      PathPoint P6: humerus (0.01068 -0.07736 -0.00165)
      PathPoint P7: humerus (0.01703 -0.12125 0.00024)
      PathPoint P8: humerus (0.0228 -0.1754 -0.0063)
      ConditionalPathPoint P9: radius (0.01206154 -0.03099677 -0.0113938) coordinate=elbow_flex range=(-1 1.3962)
      ConditionalPathPoint P10: radius (0.00243224 -0.0363745 -0.00571334) coordinate=elbow_flex range=(-1 1.3962)
      PathPoint P11: radius (-0.002 -0.0375 -0.002)
      tendon_force_length_curve: NaturalCubicSpline: x=(-10 -0.002 -0.001 0 0.00131 0.00281 0.00431 0.00581 0.00731 0.00881 0.0103 0.0118 0.0123 9.2 9.201 9.202 20)
          y=(0 0 0 0 0.0108 0.0257 0.0435 0.0652 0.0915 0.123 0.161 0.208 0.227 345 345 345 345)
      active_force_length_curve: NaturalCubicSpline: x=(-35 0 0.401 0.402 0.4035 0.52725 0.62875 0.71875 0.86125 1.045 1.2175 1.43875 1.61875 1.62 1.621 2.2 35)
          y=(0 0 0 0 0 0.226667 0.636667 0.856667 0.95 0.993333 0.77 0.246667 0 0 0 0 0)
      passive_force_length_curve: NaturalCubicSpline: x=(-35 0.998 0.999 1.15 1.25 1.35 1.45 1.55 1.65 1.75 1.7501 1.7502 35)
          y=(0 0 0 0 0.035 0.12 0.26 0.55 1.17 2 2 2 2)
    Schutte1993Muscle BICshort: min_control=0 max_control=1 time_scale=0 activation1=0 activation2=0
        max_isometric_force=348.448 optimal_fiber_length=0.1321 tendon_slack_length=0.1923 pennation_angle=0
        max_contraction_velocity=0 damping=1
      PathPoint P1: scapula (0.01268 -0.03931 -0.02625)
      PathPoint P2: scapula (0.00093 -0.06704 -0.01593)
      PathPoint P3: humerus (0.01117 -0.07576 -0.01101)
      PathPoint P4: humerus (0.01703 -0.12125 -0.01079)
      PathPoint P5: humerus (0.0228 -0.1754 -0.0063)
      ConditionalPathPoint P6: radius (0.01206154 -0.03099677 -0.0113938) coordinate=elbow_flex range=(-1 1.3962)
      ConditionalPathPoint P7: radius (0.00243224 -0.0363745 -0.00571334) coordinate=elbow_flex range=(-1 1.3962)
      PathPoint P8: radius (-0.002 -0.0375 -0.002)
      tendon_force_length_curve: NaturalCubicSpline: x=(-10 -0.002 -0.001 0 0.00131 0.00281 0.00431 0.00581 0.00731 0.00881 0.0103 0.0118 0.0123 9.2 9.201 9.202 20)
          y=(0 0 0 0 0.0108 0.0257 0.0435 0.0652 0.0915 0.123 0.161 0.208 0.227 345 345 345 345)
      active_force_length_curve: NaturalCubicSpline: x=(-35 0 0.401 0.402 0.4035 0.52725 0.62875 0.71875 0.86125 1.045 1.2175 1.43875 1.61875 1.62 1.621 2.2 35)
          y=(0 0 0 0 0 0.226667 0.636667 0.856667 0.95 0.993333 0.77 0.246667 0 0 0 0 0)
      passive_force_length_curve: NaturalCubicSpline: x=(-35 0.998 0.999 1.15 1.25 1.35 1.45 1.55 1.65 1.75 1.7501 1.7502 35)
          y=(0 0 0 0 0.035 0.12 0.26 0.55 1.17 2 2 2 2)
    Schutte1993Muscle BRA: max_isometric_force=789.808 optimal_fiber_length=0.0858 tendon_slack_length=0.0535
        pennation_angle=0
      PathPoint P1: humerus (0.0068 -0.1739 -0.0036)
      ConditionalPathPoint P2: humerus (0.01894 -0.28559 -0.01105) coordinate=elbow_flex range=(-1 0.8131489)
      ConditionalPathPoint P3: ulna (0.00498 -0.01463 0.00128) coordinate=elbow_flex range=(-1 0.8131489)
      PathPoint P4: ulna (-0.0032 -0.0239 0.0009)
    Schutte1993Muscle Infraspinatus: max_isometric_force=7265.04 optimal_fiber_length=0.0755 tendon_slack_length=0.0308
        pennation_angle=0.3228859
      PathPoint INFSP-P1: humerus (-0.00887 0.00484 0.02448)
      ConditionalPathPoint INFSP-P2: humerus (-0.0068443 0.019348 0.0136657) range=(0.872665 3.2) coordinate=arm_flex
      ConditionalPathPoint INFSP-P3: humerus (0.00536355 0.0256765 0.00766168) range=(1.74533 3.2) coordinate=arm_flex
      PathPoint INFSP-P2: scapula (-0.07382 -0.05476 -0.04781)
    Schutte1993Muscle Latissimus_dorsi_1: max_isometric_force=2334.6 optimal_fiber_length=0.254
        tendon_slack_length=0.12 pennation_angle=0.4363323
      PathPoint LAT1-P1: humerus (0.0105 -0.03415 -0.00653)
      PathPoint P2: humerus (-0.000801571 -0.0315897 -0.013405)
      ConditionalPathPoint default: humerus (-0.0122456 -0.0158357 -0.0224284) range=(0.349066 3.2) coordinate=arm_flex
      ConditionalPathPoint default: humerus (-0.0126011 0.00810135 -0.0322038) range=(1.0472 3.2) coordinate=arm_flex
      ConditionalPathPoint default: humerus (0.00474523 0.00914498 -0.0377025) range=(2.61799 3.2) coordinate=arm_flex
      PathPoint LAT1-P2: thorax (-0.08854 -0.06153 0.14488)
      PathPoint LAT1-P3: thorax (-0.11939 -0.07953 0.11232)
      PathPoint LAT1-P4: thorax (-0.11828 -0.10118 0.03316)
      PathPoint LAT1-P5: thorax (-0.09578 -0.11724 0.00882)
    Schutte1993Muscle Latissimus_dorsi_2: max_isometric_force=2334.6 optimal_fiber_length=0.2324
        tendon_slack_length=0.1765 pennation_angle=0.3316126
      PathPoint LAT2-P1: humerus (0.00968 -0.04071 -0.00611)
      PathPoint P2: humerus (0.000600034 -0.0389901 -0.0137037)
      ConditionalPathPoint default: humerus (-0.0148287 -0.0215159 -0.0269928) range=(0.349066 3.2) coordinate=arm_flex
      ConditionalPathPoint default: humerus (-0.0178592 -0.000397019 -0.0369596) range=(1.0472 3.2) coordinate=arm_flex
      ConditionalPathPoint default: humerus (0.00234554 0.00643987 -0.0444347) range=(2.61799 3.2) coordinate=arm_flex
      PathPoint LAT2-P2: thorax (-0.0805 -0.06686 0.16486)
      PathPoint LAT2-P3: thorax (-0.10517 -0.1267 0.1194)
      PathPoint LAT2-P4: thorax (-0.10992 -0.16908 0.02878)
      PathPoint LAT2-P5: thorax (-0.07186 -0.18818 0.00815)
    Schutte1993Muscle Latissimus_dorsi_3: max_isometric_force=844.98 optimal_fiber_length=0.2789
        tendon_slack_length=0.1403 pennation_angle=0.3665191
      PathPoint LAT3-P1: humerus (0.01208 -0.03922 -0.00416)
      PathPoint P2: humerus (0.00439304 -0.0372487 -0.0152687)
      ConditionalPathPoint default: humerus (-0.00913701 -0.0222411 -0.0347091) range=(0.349066 3.2)
          coordinate=arm_flex
      ConditionalPathPoint default: humerus (-0.0127151 -0.00432691 -0.0492893) range=(1.0472 3.2) coordinate=arm_flex
      ConditionalPathPoint default: humerus (0.00281758 0.00261719 -0.0602245) range=(2.61799 3.2) coordinate=arm_flex
      PathPoint LAT3-P2: thorax (-0.06702 -0.09303 0.1686)
      PathPoint LAT3-P3: thorax (-0.08567 -0.14961 0.12246)
      PathPoint LAT3-P4: thorax (-0.11157 -0.19387 0.05532)
      PathPoint LAT3-P5: thorax (-0.07117 -0.24858 0.00907)
    Schutte1993Muscle Coracobrachialis: max_isometric_force=727.38 optimal_fiber_length=0.0932
        tendon_slack_length=0.097 pennation_angle=0
      PathPoint CORB-P1: scapula (0.0125 -0.04127 -0.02652)
      PathPoint CORB-P2: scapula (0.00483 -0.06958 -0.01563)
      PathPoint CORB-P3: humerus (0.00743 -0.15048 -0.00782)
    Schutte1993Muscle Teres_minor: max_isometric_force=2125.5 optimal_fiber_length=0.0741 tendon_slack_length=0.0713
        pennation_angle=0.418879
      PathPoint TMIN-P1: humerus (-0.0011 -0.01264 0.02156)
      ConditionalPathPoint default: humerus (-0.0150882 -0.00443819 0.0117292) range=(-0.174533 3.2)
          coordinate=arm_flex
      ConditionalPathPoint default: humerus (-0.0190694 0.00936215 0.00168515) range=(0.698132 3.2) coordinate=arm_flex
      ConditionalPathPoint default: humerus (-0.00737528 0.0182568 -0.00476424) range=(1.74533 3.2) coordinate=arm_flex
      ConditionalPathPoint default: humerus (0.00884634 0.0160229 -0.0108814) range=(2.61799 3.2) coordinate=arm_flex
      PathPoint TMIN-P2: scapula (-0.09473 -0.07991 -0.04737)
      PathPoint TMIN-P3: scapula (-0.09643 -0.08121 -0.05298)
    Schutte1993Muscle PronatorTeres: max_isometric_force=566.22 optimal_fiber_length=0.0492 tendon_slack_length=0.098
        pennation_angle=0.1745329
      PathPoint PT-P1: humerus (0.0036 -0.2759 -0.0365)
      PathPoint PT-P2: ulna (0.00846 -0.03373 -0.01432)
      PathPoint PT-P3: ulna (0.01382 -0.06411 -0.00042)
      PathPoint PT-P4: radius (0.0236 -0.0934 0.0094)
      PathPoint PT-P5: radius (0.0254 -0.1088 0.0198)
    Schutte1993Muscle ECRL: max_isometric_force=304.89 optimal_fiber_length=0.081 tendon_slack_length=0.224
        pennation_angle=0
      PathPoint P1: humerus (-0.0073 -0.2609 0.0091)
      ConditionalPathPoint P1.5: radius (0.0145 -0.00346 0.0068) coordinate=elbow_flex range=(-1 0.6981317)
      PathPoint P2: radius (0.03195 -0.13463 0.02779)
      PathPoint P3: radius (0.04243 -0.23684 0.0362)
      PathPoint P4: hand (-0.00816 -0.03627 0.02117)
    Schutte1993Muscle ANC: max_isometric_force=350 optimal_fiber_length=0.027 tendon_slack_length=0.018
        pennation_angle=0
      PathPoint P1: humerus (-0.00744 -0.28359 0.00979)
      ConditionalPathPoint P1.5: ulna (-0.013185 0.007605 0.01356) coordinate=elbow_flex range=(1.0472 3.2)
      PathPoint P2: ulna (-0.02532 -0.00124 0.006)
    Schutte1993Muscle BRD: max_isometric_force=2421.68 optimal_fiber_length=0.1726 tendon_slack_length=0.133
        pennation_angle=0
      PathPoint P1: humerus (-0.0098 -0.19963 0.00223)
      ConditionalPathPoint P1.5: radius (0.0197017 0.0041987 0.0061355) coordinate=elbow_flex range=(-1 0.2617994)
      PathPoint P2: radius (0.03577 -0.12742 0.02315)
      PathPoint P3: radius (0.0419 -0.221 0.0224)
    ObjectGroup shoulder: members=(DELT1 DELT2 DELT3 PECM1 PECM2 PECM3 Infraspinatus Latissimus_dorsi_1 Latissimus_dorsi_2 Latissimus_dorsi_3 Teres_minor Coracobrachialis)
    ObjectGroup elbow: members=(BIClong BICshort TRIlat TRIlong TRImed BRA ANC BRD ECRL PronatorTeres)
  BodySet:
    Body ground: mass=0 mass_center=(0 0 0) inertia_xx=0 inertia_yy=0 inertia_zz=0 meshes=sphere2.vtp
    Body thorax: mass=0 mass_center=(0 0 0) inertia_xx=0 inertia_yy=0 inertia_zz=0
      WeldJoint ground_thorax: parent_body=ground location_in_parent=(0 0 0) location=(0 0 0)
    Body clavicle: mass=0 mass_center=(0 0 0) inertia_xx=0 inertia_yy=0 inertia_zz=0 meshes=clavicle.vtp
      WeldJoint sternoclavicular: parent_body=thorax location_in_parent=(0.006325 0.00693 0.025465) location=(0 0 0)
    Body scapula: mass=0 mass_center=(0 0 0) inertia_xx=0 inertia_yy=0 inertia_zz=0 meshes=scapula.vtp
      WeldJoint acromioclavicular: parent_body=thorax location_in_parent=(-0.01 0.03 0.161) location=(0 0 0)
    Body humerus: mass=2.0325 mass_center=(0 -0.164502 0) inertia_xx=0.011946 inertia_yy=0.004121 inertia_zz=0.013409
        meshes=humerus.vtp
      CustomJoint shoulder: parent_body=thorax location_in_parent=(-0.0125 0 0.173)
          orientation_in_parent=(-1.570796 0 0) location=(0 0 0)
        Coordinate arm_flex: motion_type=rotational default_value=0 initial_value=0.62 range=(-0.175 1.75) clamped=true
        SpatialTransform: axes_held_at_zero=(rotation2 rotation3 translation1 translation2 translation3)
          TransformAxis rotation1: coordinates=arm_flex axis=(0 0 1) LinearFunction(coefficients=1 0)
    Body ulna: mass=0.6075 mass_center=(0 -0.120525 0) inertia_xx=0.002962 inertia_yy=0.000618 inertia_zz=0.003213
        meshes=ulna.vtp
      CustomJoint elbow: parent_body=humerus location_in_parent=(0.0061 -0.2904 -0.0123) location=(0 0 0)
        Coordinate elbow_flex: motion_type=rotational default_value=0 initial_value=1.53 range=(0 2.268928)
            clamped=true
        SpatialTransform: axes_held_at_zero=(rotation1 rotation2 translation1 translation2 translation3)
          TransformAxis rotation3: coordinates=elbow_flex axis=(0.04940001 0.03660001 0.9981083)
              LinearFunction(coefficients=1 0)
    Body radius: mass=0.6075 mass_center=(0 -0.120525 0) inertia_xx=0.002962 inertia_yy=0.000618 inertia_zz=0.003213
        meshes=radius.vtp
      WeldJoint radioulnar: parent_body=ulna location_in_parent=(0.0004 -0.011503 0.019999) location=(0 0 0)
    Body hand: mass=0.4575 mass_center=(0 -0.068095 0) inertia_xx=0.000892 inertia_yy=0.000547 inertia_zz=0.00134
        meshes=(pisiform_rvs.vtp lunate_rvs.vtp scaphoid_rvs.vtp triquetrum_rvs.vtp hamate_rvs.vtp capitate_rvs.vtp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)
      WeldJoint radius_hand: parent_body=radius location_in_parent=(0.018 -0.242 0.025)
          orientation_in_parent=(0 1.5708 0) location=(0 0 0)
